*Heading
** Job name: EbodyRbody Model name: Model-1
** Generated by: Abaqus/CAE 6.12-3
*Preprint, echo=NO, model=NO, history=NO, contact=NO
**
** PARTS
**
*Part, name=rect
*Node
1,    0.000000000000,     0.000000000000
2,    0.312500000000,     0.000000000000
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*User element, nodes=4, type=U4, properties=3,coordinates=2, variables=7
1,2
*User element, nodes=5, type=U5, properties=3,coordinates=2, variables=7
1,2
*User element, nodes=6, type=U6, properties=3,coordinates=2, variables=7
1,2
*User element, nodes=7, type=U7, properties=3,coordinates=2, variables=7
1,2
*User element, nodes=8, type=U8, properties=3,coordinates=2, variables=7
1,2
*Element, type=U4,ELSET=four
1,1,2,3,4
2,12,13,14,15
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*UEL Property, ELSET=four
1, 1.0000e+08,  0.35
*Element, type=U5,ELSET=five
548,32,33,34,35,36
549,153,154,155,156,157
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*UEL Property, ELSET=five
1, 1.0000e+08,  0.35
*Element, type=U6,ELSET=six
579,105,106,107,108,109,110
580,111,112,113,114,115,116
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*UEL Property, ELSET=six
1, 1.0000e+08,  0.35
*Element, type=U7,ELSET=seven
593,5,6,7,8,9,10,11
594,158,159,160,161,162,163,164
595,215,216,101,104,217,218,219
596,242,243,99,244,105,245,246
597,639,640,641,642,493,492,643
*UEL Property, ELSET=seven
1, 1.0000e+08,  0.35
*Element, type=U8,ELSET=eight
598,93,94,95,96,97,98,99,100,
599,286,287,288,289,260,38,37,290,
600,497,498,499,500,501,361,360,502,
601,515,536,178,181,391,537,538,539,
*UEL Property, ELSET=eight
1, 1.0000e+08,  0.35
*Nset, nset=Set-1
1,  696,1
*Elset, elset=Set-1, generate
1,601,1
** Section: Section-1
*Solid Section, elset=Set-1, material=Material-1
,
*End Part
**
*Part, name=rigid
*Node
1,    0.000000000000,     0.000000000000
2,    0.600000024000,     0.000000000000
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*Element, type=CPE4
1,1,2,13,12
2,2,3,14,13
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*Nset, nset=Set-1, generate
  1,  33,   1
*Elset, elset=Set-1, generate
 1,  20,   1
** Section: Section-2
*Solid Section, elset=Set-1, material=Material-2
,
*End Part
**
**
**ASSEMBLY
**
*Assembly, name=Assembly
**
*Instance, name=rect-1, part=rect
         5.6,           1.,           0.
*End Instance
**
*Instance, name=rigid-1, part=rigid
         5.6,           0.,           0.
*End Instance
*Nset, nset=s_Set-1, instance=rect-1
1, 2, 5, 6, 20, 21
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*Elset, elset=s_Set-1, instance=rect-1, generate
 1,  4,  1
*Nset, nset=Set-2, instance=rigid-1, generate
  1,  23,  11
*Elset, elset=Set-2, instance=rigid-1
  1, 11
*Nset, nset=Set-3, instance=rigid-1, generate
  1,  11,   1
*Elset, elset=Set-3, instance=rigid-1, generate
  1,  10,   1
*Nset, nset=Set-4, instance=rect-1
1, 4, 12, 15, 24, 27
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*Elset, elset=Set-4, instance=rect-1, generate
  1,  13,   4
*Elset, elset=_m_Surf-1_S3, internal, instance=rigid-1, generate
 11,  20,   1
*Surface, type=ELEMENT, name=m_Surf-1
_m_Surf-1_S3, S3
*Elset, elset=_Surf-2_S3, internal, instance=rect-1, generate
 13,  16,   1
*Surface, type=NODE, name=s_Set-1_CNS_, internal
s_Set-1, 1.
*End Assembly
** MATERIALS
*Material, name=Material-1
*Elastic
 1e+08, 0.35
*Material, name=Material-2
*Elastic
1e+16,0.
*Surface Interaction, name=IntProp-1
1.,
*Friction, rough
*Contact Pair, interaction=IntProp-1, small sliding
s_Set-1_CNS_, m_Surf-1
*Step, name=Step-1
*Static
1., 1., 1e-05, 1.
*Boundary
Set-2, 1, 1
*Boundary
Set-3, 1, 1
Set-3, 2, 2
*Boundary
Set-4, 1, 1
*Cload
rect-1.671 , 2 ,-312500.000000
rect-1.668 , 2 ,-625000.000000
rect-1.315 , 2 ,-625000.000000
rect-1.314 , 2 ,-625000.000000
rect-1.224 , 2 ,-625000.000000
rect-1.225 , 2 ,-468750.000000
rect-1.681 , 2 ,-312500.000000
rect-1.680 , 2 ,-312500.000000
rect-1.679 , 2 ,-312500.000000
rect-1.678 , 2 ,-312500.000000
rect-1.676 , 2 ,-312500.000000
rect-1.677 , 2 ,-156250.000000
*Restart, write, frequency=0
*Output, field, variable=PRESELECT
*Output, history, variable=PRESELECT
*End Step
